*Heading
** Job name: Job-1 Model name: cube
** Generated by: Abaqus/CAE 2019
*Preprint, echo=NO, model=NO, history=NO, contact=NO
**
** PARTS
**
*Part, name=PART-1
*Node
 999999,           0.,           0.,           0.
1000000,      -2039.5,        27.75,          21.
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*Element, type=S4R
39526,1000257,1000256,1000000,1000001
39527,1000258,1000257,1000001,1000002
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*Elset, elset=GRAIN1_SET
 46447, 46702, 46957, 47211, 47466
*Elset, elset=GRAIN2_SET
 40800, 41055, 41310, 41564, 41565, 41818
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*Elset, elset=GRAIN3_SET
 45873, 45874, 46128, 46129, 46383, 46384, 46385, 46638
*Elset, elset=GRAIN4_SET
 50640, 50895, 51138, 51149, 51150, 51392
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*Elset, elset=GRAIN5_SET
 39568, 39569, 39570, 39823, 39824, 39825
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*Elset, elset=GRAIN6_SET, generate
 76020,  78315,    255
*Elset, elset=GRAIN7_SET
 45621, 45622, 45876, 45877, 45878, 45879
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*Elset, elset=GRAIN8_SET
 46051, 46306, 46307, 46561, 46562, 46816, 46817, 47070, 47071, 47325, 47326, 47581
*Elset, elset=GRAIN9_SET
 64000, 64254, 64255, 64509, 64510, 64764
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*Elset, elset=GRAIN10_SET
 41744, 42000, 42254, 42255, 42509, 42510, 42764, 43019
*Elset, elset=GRAIN11_SET
 59207, 59462, 59717, 59972, 60226, 60481
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*Elset, elset=GRAIN12_SET
 43005, 43259, 43514, 43769, 44023, 44024
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*Elset, elset=GRAIN13_SET
 52861, 53116, 53371, 53626, 53881, 54136, 54391, 54901
*Elset, elset=GRAIN14_SET
 48813, 49067, 49068, 49322, 49323, 49577, 49578
*Elset, elset=GRAIN15_SET
 63854, 63855, 64109, 64110, 64358, 64364
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*Elset, elset=GRAIN16_SET
 39575, 39576, 39577, 39578, 39579, 39580
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*Elset, elset=GRAIN17_SET
 47595, 47848, 47850, 48103, 48104, 48105, 48358, 48359, 48360, 48614, 48869
*Elset, elset=GRAIN18_SET
 57011, 57012, 57013, 57266, 57267, 57268
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*Elset, elset=GRAIN19_SET
 40559, 40814, 41069, 41323, 41324, 41578, 41579, 41833, 41834, 42088, 42089, 42343, 42344, 44128
*Elset, elset=GRAIN20_SET
 39749, 39750, 39751, 39752, 39753, 39754
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*Elset, elset=GRAIN21_SET
 42622, 42876, 42877, 43131, 43132, 43386
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*Elset, elset=GRAIN22_SET, generate
 67058,  68588,    255
*Elset, elset=GRAIN23_SET
 57850, 58105, 58360, 58615, 58870, 59125, 59380, 59634, 59635, 59889, 60144, 60399, 60654, 60909, 61164
*Elset, elset=GRAIN24_SET
 40093, 40094, 40348, 40349, 40603, 40604, 40857, 40858, 40859, 41112, 41113, 41367
*Elset, elset=GRAIN25_SET
 55846, 56101, 56102, 56356, 56357, 56611
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*Elset, elset=GRAIN26_SET
 60970, 60972, 61225, 61227, 61480, 61482
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*Elset, elset=GRAIN27_SET
 78251, 78506, 78507, 78508, 78761, 78762, 78763, 78764, 79016, 79017, 79018, 79019, 79020, 79021
*Elset, elset=GRAIN28_SET
 53367, 53622, 53876, 54131, 54386, 54641, 54896, 55151, 55406, 55661, 55916, 56171, 56426, 56681, 56936, 57191
*Elset, elset=GRAIN29_SET
 58788, 59043, 59297, 59298, 59299, 59552
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*Elset, elset=GRAIN30_SET
 42931, 43186, 43441, 43695, 43696, 43950
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*Elset, elset=GRAIN31_SET
 40564, 40820, 41074, 41075, 41329, 41330, 41584, 41585, 41839, 41840, 42094, 42095, 42349, 42350, 42604, 42859
*Elset, elset=GRAIN32_SET
 50938, 51193, 51448, 51702, 51703, 51957
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*Elset, elset=GRAIN33_SET
 47342, 47343, 47597, 47598, 47852, 48107
*Elset, elset=GRAIN34_SET
 62506, 62761, 63016, 63271, 63526, 64292
*Elset, elset=GRAIN35_SET
 50418, 50672, 50673, 50926, 50927, 50928
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*Elset, elset=GRAIN36_SET
 43765, 43766, 44020, 44021, 44274, 44275
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*Elset, elset=GRAIN37_SET
 48346, 48601, 48854, 48855, 48856, 49109
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*Elset, elset=GRAIN38_SET
 46236, 46491, 46746, 47001, 47256, 47511
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*Elset, elset=GRAIN39_SET
 45199, 45454, 45455, 45709, 45710, 45964, 45965
*Elset, elset=GRAIN40_SET
 42498, 43007, 43262, 43517, 43772, 44027, 45302
*Elset, elset=GRAIN41_SET
 66102, 66103, 66357, 66358, 66612, 66613, 66867, 66868, 66869, 67123
*Elset, elset=GRAIN42_SET
 39617, 39618, 39619, 39622, 39623, 39624
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*Elset, elset=GRAIN43_SET
 39841, 40095, 40096, 40097, 40099, 40100
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*Elset, elset=GRAIN44_SET
 47347, 47601, 47602, 47856, 47857, 48111, 48112
*Elset, elset=GRAIN45_SET
 49369, 49878, 50133, 50897, 51152, 51406
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*Elset, elset=GRAIN46_SET
 50638, 50639, 50893, 50894, 51148, 51403
*Elset, elset=GRAIN47_SET
 56975, 56976, 57229, 57230, 57231, 57232
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*Elset, elset=GRAIN48_SET
 39758, 39759, 39760, 39761, 39762, 39763
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*Elset, elset=GRAIN49_SET
 47106, 47360, 47361, 47615, 47616, 47870, 47871, 48124, 48125, 48379, 48380, 48633, 48634, 48635, 48890
*Elset, elset=GRAIN50_SET
 59214, 59469, 59470, 59724, 59725, 59726
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*Elset, elset=GRAIN51_SET
 58574, 58829, 59084, 59339, 59593
*Elset, elset=GRAIN52_SET
 77072, 77073, 77327, 77328, 77583
*Elset, elset=GRAIN53_SET
 47125, 47380, 47381, 47635, 47636, 47890, 47891, 48144, 48146, 48401
*Elset, elset=GRAIN54_SET
 49232, 49487, 49742, 49743, 50508
*Elset, elset=GRAIN55_SET
 59451, 59704, 59705, 59706, 59959, 59960, 59961, 60215, 60470
*Elset, elset=GRAIN56_SET
 40339, 40593, 40594, 40847, 40848, 40849
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*Elset, elset=GRAIN57_SET
 50802, 51311, 51566, 51820, 52073, 52074
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*Elset, elset=GRAIN58_SET
 52726, 52981, 53237, 53240, 53491, 53492
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*Elset, elset=GRAIN59_SET
 46235, 46490, 46743, 46744, 46745, 46999, 47000, 47254, 47255, 47509, 47510, 47765
*Elset, elset=GRAIN60_SET
 40124, 40369, 40378, 40379, 40624, 40625
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*Elset, elset=GRAIN61_SET
 39605, 39606, 39860, 39861, 40114, 40115, 40116, 40370, 40371, 40372, 40626
*Elset, elset=GRAIN62_SET
 47119, 47374, 47629, 47884, 47885, 47886
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*Elset, elset=GRAIN63_SET
 55550, 55805, 56059, 56060, 56569, 56824, 57079, 57334
*Elset, elset=GRAIN64_SET
 51704, 51958, 51959, 52213, 52468, 52723, 52978, 53232, 53233, 53487, 53488, 53742, 53743, 53997, 53998
*Elset, elset=GRAIN65_SET
 56238, 56493, 56495, 56748, 56749, 56750
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*Elset, elset=GRAIN66_SET
 50650, 50651, 50904, 50905, 50906, 51159, 51160, 51414
*Elset, elset=GRAIN67_SET
 54076, 54331, 54586, 54587, 54841, 54842
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*Elset, elset=GRAIN68_SET
 44448, 44449, 44703, 44704, 44957, 44958, 44959, 45212, 45213, 45214, 45468, 45469, 45723, 45978, 46233, 46488
*Elset, elset=GRAIN69_SET
 44547, 44548, 44802, 44803, 45057, 45058, 45312, 45313, 45567
*Elset, elset=GRAIN70_SET
 45042, 45296, 45297, 45551, 45806
*Elset, elset=GRAIN71_SET
 57875, 58130, 58385, 58640, 59150, 59405
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*Elset, elset=GRAIN72_SET
 54506, 54761, 55016, 55271, 55780, 56035
*Elset, elset=GRAIN73_SET
 46218, 46473, 46728, 46729, 46730, 46982
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*Elset, elset=GRAIN74_SET
 63487, 63742, 63999, 64251, 64252, 64506
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*Elset, elset=GRAIN75_SET
 41743, 41997, 41998, 41999, 42252, 42253, 42507, 42508, 42761, 42762
*Elset, elset=GRAIN76_SET
 49883, 50138, 50392, 50393, 50647, 50902, 51156, 51157, 51411, 51412, 51665, 51666, 51667, 51920, 51921, 52175
*Elset, elset=GRAIN77_SET
 59209, 59463, 59464, 59718, 59719, 59973, 60227, 60228, 60482, 60483, 60737, 60738, 60993, 61248, 61503, 61758
*Elset, elset=GRAIN78_SET
 73221, 73987, 74242, 74497, 74752, 75007
*Elset, elset=GRAIN79_SET
 68341, 68596, 68851, 68852, 69106, 69107, 69361, 69362
*Elset, elset=GRAIN80_SET
 46601, 46602, 46856, 46857, 46858, 47111
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*Elset, elset=GRAIN81_SET
 39583, 39584, 39585, 39586, 39587, 39588
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*Elset, elset=GRAIN82_SET
 50265, 50266, 50267, 50519, 50520, 50521
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*Elset, elset=GRAIN83_SET
 52857, 53112, 53877, 54132, 54387, 54642, 54897, 55152, 55407, 55662
*Elset, elset=GRAIN84_SET
 46828, 47082, 47083, 47337, 47338, 47339
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*Elset, elset=GRAIN85_SET
 49250, 49505, 50014, 50268, 50269, 50523
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*Elset, elset=GRAIN86_SET
 52176, 52429, 52430, 52431, 52684, 52685
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*Elset, elset=GRAIN87_SET
 67949, 68204, 68459, 68714, 68715, 68970, 69225, 69480, 69735, 69990
*Elset, elset=GRAIN88_SET
 40457, 40712, 40713, 40967, 40968, 41222, 41223, 41477, 41478, 41732, 41987, 41988, 42242, 42243, 42497, 42752
*Elset, elset=GRAIN89_SET
 41902, 41903, 41904, 42155, 42156, 42157
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*Elset, elset=GRAIN90_SET
 49740, 49995, 50250, 50505, 50759, 50760
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*Elset, elset=GRAIN91_SET
 53054, 53309, 53564, 53565, 53819, 53820
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*Elset, elset=GRAIN92_SET
 46428, 46683, 46938, 47193, 47448, 47702, 47703, 47957, 48212, 48467, 48722, 48977
*Elset, elset=GRAIN93_SET
 48642, 48897, 49152, 49406, 49407, 49661
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*Elset, elset=GRAIN94_SET
 62498, 62752, 62753, 63007, 63008, 63262, 63263, 63517, 63518, 63772, 64027, 64538, 64793
*Elset, elset=GRAIN95_SET
 55917, 56172, 56427, 56682, 56937, 57192
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*Elset, elset=GRAIN96_SET
 49012, 49266, 49267, 49521, 49522, 49776
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*Elset, elset=GRAIN97_SET
 46082, 46083, 46337, 46592, 46593, 46848
*Elset, elset=GRAIN98_SET
 47624, 47879, 48134, 48899, 49154, 49409, 49664, 49919, 50174, 50428, 50683
*Elset, elset=GRAIN99_SET
 56924, 57179, 57198, 57434, 57446, 57453
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*Elset, elset=GRAIN100_SET
 47179, 47180, 47434, 47435, 47688, 47689
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*Elset, elset=GRAIN101_SET
 45910, 45911, 46165, 46419, 46420, 46674
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*Elset, elset=GRAIN102_SET
 47101, 47355, 47356, 47610, 47611, 47865
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*Elset, elset=GRAIN103_SET
 72583, 72838, 73348, 73603, 73858
*Elset, elset=GRAIN104_SET
 39689, 39690, 39691, 39692, 39693, 39694
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*Elset, elset=GRAIN105_SET
 55003, 55004, 55258, 55259, 55260, 55514, 55515, 55769, 55770
*Elset, elset=GRAIN106_SET
 39544, 39545, 39546, 39547, 39548, 39549
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*Elset, elset=GRAIN107_SET
 50948, 50949, 51202, 51203, 51204, 51457
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*Elset, elset=GRAIN108_SET
 42110, 42365, 42620, 42621, 42875, 43130, 43384, 43385, 43639, 43640, 43894, 43895, 44150
*Elset, elset=GRAIN109_SET
 49940, 50195, 50450, 50705, 50959, 50960
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*Elset, elset=GRAIN110_SET
 68457, 68712, 68967, 69733, 69988, 70243, 70498, 70753, 71008
*Elset, elset=GRAIN111_SET
 59336, 59589, 59590, 59591, 59844, 59845
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*Elset, elset=GRAIN112_SET
 74011, 74265, 74520, 74775, 75030, 75285, 75540
*Elset, elset=GRAIN113_SET
 67066, 67067, 67321, 67322, 67576, 67577, 67831, 67832, 68086, 68087, 68342, 68597
*Elset, elset=GRAIN114_SET
 58274, 58529, 58784, 59038, 59293, 59294
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*Elset, elset=GRAIN115_SET
 65791, 66046, 66047, 66301, 66302, 66303, 66556, 66557, 66558, 66811, 66812, 66813, 67068, 67069, 67324
*Elset, elset=GRAIN116_SET
 49741, 49996, 50251, 50506, 50761, 51016
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*Elset, elset=GRAIN117_SET
 76458, 76459, 76713, 76714, 76968, 76969, 76970, 77224, 77225
*Elset, elset=GRAIN118_SET
 39551, 39552, 39553, 39554, 39555, 39556
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*Elset, elset=GRAIN119_SET
 39702, 39703, 39704, 39705, 39706, 39707
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*Elset, elset=GRAIN120_SET
 61632, 61887, 61888, 62142, 62143, 62144
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*Elset, elset=GRAIN121_SET
 48655, 48909, 48910, 48911, 49164, 49165, 49166, 49421, 49422, 49676
*Elset, elset=GRAIN122_SET
 51922, 52177, 52432, 52687, 52942, 52943, 53197, 53198, 53452, 53453, 53707, 53708, 53962, 53963, 54217
*Elset, elset=GRAIN123_SET
 46098, 46099, 46353, 46354, 46608, 46609
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*Elset, elset=GRAIN124_SET, generate
 44206,  45226,    255
*Elset, elset=GRAIN125_SET
 41083, 41338, 41339, 41593, 41594, 41595
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*Elset, elset=GRAIN126_SET
 46359, 46614, 46615, 46869, 47124, 47633, 47888, 48397, 48398, 48652
*Elset, elset=GRAIN127_SET
 67304, 67305, 67558, 67559, 67560, 67813
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*Elset, elset=GRAIN128_SET
 53032, 53287, 53542, 53543, 53797, 53798, 54052, 54307, 54562, 54817, 55072, 55327, 55582, 55837
*Elset, elset=GRAIN129_SET
 45323, 45578, 45580, 45833, 45835, 46088
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*Elset, elset=GRAIN130_SET
 39699, 39700, 39701, 39954, 39955, 39956
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*Elset, elset=GRAIN131_SET
 53024, 53279, 53534, 53789, 54043, 54044, 54299, 54554
*Elset, elset=GRAIN132_SET
 55001, 55002, 55256, 55257, 55511, 55512
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*Elset, elset=GRAIN133_SET
 46109, 46110, 46111, 46112, 46113, 46363
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*Elset, elset=GRAIN134_SET
 39620, 39621, 39874, 39875, 39876, 40128
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*Elset, elset=GRAIN135_SET
 39573, 39574, 39828, 39829, 40083, 40084, 40338
*Elset, elset=GRAIN136_SET
 39777, 39778, 39779, 39780, 40032, 40033
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*Elset, elset=GRAIN137_SET
 42141, 42396, 42651, 42902, 42906, 43157
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*Elset, elset=GRAIN138_SET
 75387, 75388, 75642, 75643, 75644, 75898, 75899, 76153, 76154, 76408, 76409, 76663, 76664, 76919, 77174
*Elset, elset=GRAIN139_SET
 75716, 75971, 76226, 76480, 76481, 76482
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*Elset, elset=GRAIN140_SET
 42763, 43016, 43017, 43018, 43271, 43272
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*Elset, elset=GRAIN141_SET
 45727, 45728, 45981, 45982, 45983, 45984
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*Elset, elset=GRAIN142_SET
 39526, 39527, 39528, 39529, 39530, 39531
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*Elset, elset=GRAIN143_SET
 72303, 72558, 72559, 72813, 72814, 73067
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*Elset, elset=GRAIN144_SET
 44544, 44545, 44552, 44553, 44796, 44797
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*Elset, elset=GRAIN145_SET
 56491, 56745, 56746, 57000, 57001, 57255, 57256, 57510, 57511, 57765, 58020, 58275, 58530
*Elset, elset=GRAIN146_SET
 65026, 65281, 65536, 65537, 65792
*Elset, elset=GRAIN147_SET
 56941, 57196, 57451, 57452, 57706, 57707, 57961, 57962, 58216, 58217, 58472, 58727, 58982, 59237, 59492, 59747
*Elset, elset=GRAIN148_SET
 53785, 54034, 54040, 54289, 54290, 54293
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*Elset, elset=GRAIN149_SET
 39615, 39616, 39870, 40125, 40380, 40635
*Elset, elset=GRAIN150_SET
 44849, 45104, 45359, 45614, 45869, 46123
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*Elset, elset=GRAIN151_SET
 76512, 76767, 77022, 77277, 78296, 78551, 78552, 78806, 78807
*Elset, elset=GRAIN152_SET, generate
 76128,  77658,    255
*Elset, elset=GRAIN153_SET
 59723, 59978, 60233, 60487, 60488
*Elset, elset=GRAIN154_SET
 59582, 59835, 59837, 59839, 60090, 60092
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*Elset, elset=GRAIN155_SET
 46933, 47188, 47443, 47444, 47698, 47699
*Elset, elset=GRAIN156_SET
 57429, 57683, 57938, 58193, 58448
*Elset, elset=GRAIN157_SET
 60405, 60660, 60915, 61935, 62190
*Elset, elset=GRAIN158_SET
 50185, 50186, 50441, 50695, 50696, 50950, 50951, 51205, 51206, 51461
*Elset, elset=GRAIN159_SET
 53606, 54370, 54625, 54879, 55133, 55134, 55388, 55643
*Elset, elset=GRAIN160_SET
 39604, 39607, 39608, 39609, 39610, 39611
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*Elset, elset=GRAIN161_SET
 70542, 70797, 71051, 71052, 71053, 71306
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** Section: Section-142-GRAIN142_SET
*Solid Section, elset=GRAIN142_SET, material=GRAIN_MAT142
,
** Section: Section-106-GRAIN106_SET
*Solid Section, elset=GRAIN106_SET, material=GRAIN_MAT106
,
** Section: Section-118-GRAIN118_SET
*Solid Section, elset=GRAIN118_SET, material=GRAIN_MAT118
,
** Section: Section-5-GRAIN5_SET
*Solid Section, elset=GRAIN5_SET, material=GRAIN_MAT5
,
** Section: Section-135-GRAIN135_SET
*Solid Section, elset=GRAIN135_SET, material=GRAIN_MAT135
,
** Section: Section-16-GRAIN16_SET
*Solid Section, elset=GRAIN16_SET, material=GRAIN_MAT16
,
** Section: Section-81-GRAIN81_SET
*Solid Section, elset=GRAIN81_SET, material=GRAIN_MAT81
,
** Section: Section-160-GRAIN160_SET
*Solid Section, elset=GRAIN160_SET, material=GRAIN_MAT160
,
** Section: Section-61-GRAIN61_SET
*Solid Section, elset=GRAIN61_SET, material=GRAIN_MAT61
,
** Section: Section-149-GRAIN149_SET
*Solid Section, elset=GRAIN149_SET, material=GRAIN_MAT149
,
** Section: Section-42-GRAIN42_SET
*Solid Section, elset=GRAIN42_SET, material=GRAIN_MAT42
,
** Section: Section-134-GRAIN134_SET
*Solid Section, elset=GRAIN134_SET, material=GRAIN_MAT134
,
** Section: Section-104-GRAIN104_SET
*Solid Section, elset=GRAIN104_SET, material=GRAIN_MAT104
,
** Section: Section-130-GRAIN130_SET
*Solid Section, elset=GRAIN130_SET, material=GRAIN_MAT130
,
** Section: Section-119-GRAIN119_SET
*Solid Section, elset=GRAIN119_SET, material=GRAIN_MAT119
,
** Section: Section-20-GRAIN20_SET
*Solid Section, elset=GRAIN20_SET, material=GRAIN_MAT20
,
** Section: Section-48-GRAIN48_SET
*Solid Section, elset=GRAIN48_SET, material=GRAIN_MAT48
,
** Section: Section-136-GRAIN136_SET
*Solid Section, elset=GRAIN136_SET, material=GRAIN_MAT136
,
** Section: Section-43-GRAIN43_SET
*Solid Section, elset=GRAIN43_SET, material=GRAIN_MAT43
,
** Section: Section-24-GRAIN24_SET
*Solid Section, elset=GRAIN24_SET, material=GRAIN_MAT24
,
** Section: Section-60-GRAIN60_SET
*Solid Section, elset=GRAIN60_SET, material=GRAIN_MAT60
,
** Section: Section-56-GRAIN56_SET
*Solid Section, elset=GRAIN56_SET, material=GRAIN_MAT56
,
** Section: Section-88-GRAIN88_SET
*Solid Section, elset=GRAIN88_SET, material=GRAIN_MAT88
,
** Section: Section-19-GRAIN19_SET
*Solid Section, elset=GRAIN19_SET, material=GRAIN_MAT19
,
** Section: Section-31-GRAIN31_SET
*Solid Section, elset=GRAIN31_SET, material=GRAIN_MAT31
,
** Section: Section-2-GRAIN2_SET
*Solid Section, elset=GRAIN2_SET, material=GRAIN_MAT2
,
** Section: Section-125-GRAIN125_SET
*Solid Section, elset=GRAIN125_SET, material=GRAIN_MAT125
,
** Section: Section-75-GRAIN75_SET
*Solid Section, elset=GRAIN75_SET, material=GRAIN_MAT75
,
** Section: Section-10-GRAIN10_SET
*Solid Section, elset=GRAIN10_SET, material=GRAIN_MAT10
,
** Section: Section-89-GRAIN89_SET
*Solid Section, elset=GRAIN89_SET, material=GRAIN_MAT89
,
** Section: Section-108-GRAIN108_SET
*Solid Section, elset=GRAIN108_SET, material=GRAIN_MAT108
,
** Section: Section-137-GRAIN137_SET
*Solid Section, elset=GRAIN137_SET, material=GRAIN_MAT137
,
** Section: Section-40-GRAIN40_SET
*Solid Section, elset=GRAIN40_SET, material=GRAIN_MAT40
,
** Section: Section-21-GRAIN21_SET
*Solid Section, elset=GRAIN21_SET, material=GRAIN_MAT21
,
** Section: Section-140-GRAIN140_SET
*Solid Section, elset=GRAIN140_SET, material=GRAIN_MAT140
,
** Section: Section-30-GRAIN30_SET
*Solid Section, elset=GRAIN30_SET, material=GRAIN_MAT30
,
** Section: Section-12-GRAIN12_SET
*Solid Section, elset=GRAIN12_SET, material=GRAIN_MAT12
,
** Section: Section-36-GRAIN36_SET
*Solid Section, elset=GRAIN36_SET, material=GRAIN_MAT36
,
** Section: Section-124-GRAIN124_SET
*Solid Section, elset=GRAIN124_SET, material=GRAIN_MAT124
,
** Section: Section-68-GRAIN68_SET
*Solid Section, elset=GRAIN68_SET, material=GRAIN_MAT68
,
** Section: Section-144-GRAIN144_SET
*Solid Section, elset=GRAIN144_SET, material=GRAIN_MAT144
,
** Section: Section-69-GRAIN69_SET
*Solid Section, elset=GRAIN69_SET, material=GRAIN_MAT69
,
** Section: Section-150-GRAIN150_SET
*Solid Section, elset=GRAIN150_SET, material=GRAIN_MAT150
,
** Section: Section-70-GRAIN70_SET
*Solid Section, elset=GRAIN70_SET, material=GRAIN_MAT70
,
** Section: Section-39-GRAIN39_SET
*Solid Section, elset=GRAIN39_SET, material=GRAIN_MAT39
,
** Section: Section-129-GRAIN129_SET
*Solid Section, elset=GRAIN129_SET, material=GRAIN_MAT129
,
** Section: Section-7-GRAIN7_SET
*Solid Section, elset=GRAIN7_SET, material=GRAIN_MAT7
,
** Section: Section-141-GRAIN141_SET
*Solid Section, elset=GRAIN141_SET, material=GRAIN_MAT141
,
** Section: Section-3-GRAIN3_SET
*Solid Section, elset=GRAIN3_SET, material=GRAIN_MAT3
,
** Section: Section-101-GRAIN101_SET
*Solid Section, elset=GRAIN101_SET, material=GRAIN_MAT101
,
** Section: Section-8-GRAIN8_SET
*Solid Section, elset=GRAIN8_SET, material=GRAIN_MAT8
,
** Section: Section-97-GRAIN97_SET
*Solid Section, elset=GRAIN97_SET, material=GRAIN_MAT97
,
** Section: Section-123-GRAIN123_SET
*Solid Section, elset=GRAIN123_SET, material=GRAIN_MAT123
,
** Section: Section-133-GRAIN133_SET
*Solid Section, elset=GRAIN133_SET, material=GRAIN_MAT133
,
** Section: Section-73-GRAIN73_SET
*Solid Section, elset=GRAIN73_SET, material=GRAIN_MAT73
,
** Section: Section-59-GRAIN59_SET
*Solid Section, elset=GRAIN59_SET, material=GRAIN_MAT59
,
** Section: Section-38-GRAIN38_SET
*Solid Section, elset=GRAIN38_SET, material=GRAIN_MAT38
,
** Section: Section-126-GRAIN126_SET
*Solid Section, elset=GRAIN126_SET, material=GRAIN_MAT126
,
** Section: Section-92-GRAIN92_SET
*Solid Section, elset=GRAIN92_SET, material=GRAIN_MAT92
,
** Section: Section-1-GRAIN1_SET
*Solid Section, elset=GRAIN1_SET, material=GRAIN_MAT1
,
** Section: Section-80-GRAIN80_SET
*Solid Section, elset=GRAIN80_SET, material=GRAIN_MAT80
,
** Section: Section-84-GRAIN84_SET
*Solid Section, elset=GRAIN84_SET, material=GRAIN_MAT84
,
** Section: Section-155-GRAIN155_SET
*Solid Section, elset=GRAIN155_SET, material=GRAIN_MAT155
,
** Section: Section-102-GRAIN102_SET
*Solid Section, elset=GRAIN102_SET, material=GRAIN_MAT102
,
** Section: Section-49-GRAIN49_SET
*Solid Section, elset=GRAIN49_SET, material=GRAIN_MAT49
,
** Section: Section-62-GRAIN62_SET
*Solid Section, elset=GRAIN62_SET, material=GRAIN_MAT62
,
** Section: Section-53-GRAIN53_SET
*Solid Section, elset=GRAIN53_SET, material=GRAIN_MAT53
,
** Section: Section-100-GRAIN100_SET
*Solid Section, elset=GRAIN100_SET, material=GRAIN_MAT100
,
** Section: Section-33-GRAIN33_SET
*Solid Section, elset=GRAIN33_SET, material=GRAIN_MAT33
,
** Section: Section-44-GRAIN44_SET
*Solid Section, elset=GRAIN44_SET, material=GRAIN_MAT44
,
** Section: Section-17-GRAIN17_SET
*Solid Section, elset=GRAIN17_SET, material=GRAIN_MAT17
,
** Section: Section-98-GRAIN98_SET
*Solid Section, elset=GRAIN98_SET, material=GRAIN_MAT98
,
** Section: Section-37-GRAIN37_SET
*Solid Section, elset=GRAIN37_SET, material=GRAIN_MAT37
,
** Section: Section-93-GRAIN93_SET
*Solid Section, elset=GRAIN93_SET, material=GRAIN_MAT93
,
** Section: Section-121-GRAIN121_SET
*Solid Section, elset=GRAIN121_SET, material=GRAIN_MAT121
,
** Section: Section-14-GRAIN14_SET
*Solid Section, elset=GRAIN14_SET, material=GRAIN_MAT14
,
** Section: Section-96-GRAIN96_SET
*Solid Section, elset=GRAIN96_SET, material=GRAIN_MAT96
,
** Section: Section-54-GRAIN54_SET
*Solid Section, elset=GRAIN54_SET, material=GRAIN_MAT54
,
** Section: Section-85-GRAIN85_SET
*Solid Section, elset=GRAIN85_SET, material=GRAIN_MAT85
,
** Section: Section-45-GRAIN45_SET
*Solid Section, elset=GRAIN45_SET, material=GRAIN_MAT45
,
** Section: Section-90-GRAIN90_SET
*Solid Section, elset=GRAIN90_SET, material=GRAIN_MAT90
,
** Section: Section-116-GRAIN116_SET
*Solid Section, elset=GRAIN116_SET, material=GRAIN_MAT116
,
** Section: Section-76-GRAIN76_SET
*Solid Section, elset=GRAIN76_SET, material=GRAIN_MAT76
,
** Section: Section-109-GRAIN109_SET
*Solid Section, elset=GRAIN109_SET, material=GRAIN_MAT109
,
** Section: Section-158-GRAIN158_SET
*Solid Section, elset=GRAIN158_SET, material=GRAIN_MAT158
,
** Section: Section-82-GRAIN82_SET
*Solid Section, elset=GRAIN82_SET, material=GRAIN_MAT82
,
** Section: Section-35-GRAIN35_SET
*Solid Section, elset=GRAIN35_SET, material=GRAIN_MAT35
,
** Section: Section-46-GRAIN46_SET
*Solid Section, elset=GRAIN46_SET, material=GRAIN_MAT46
,
** Section: Section-4-GRAIN4_SET
*Solid Section, elset=GRAIN4_SET, material=GRAIN_MAT4
,
** Section: Section-66-GRAIN66_SET
*Solid Section, elset=GRAIN66_SET, material=GRAIN_MAT66
,
** Section: Section-57-GRAIN57_SET
*Solid Section, elset=GRAIN57_SET, material=GRAIN_MAT57
,
** Section: Section-32-GRAIN32_SET
*Solid Section, elset=GRAIN32_SET, material=GRAIN_MAT32
,
** Section: Section-107-GRAIN107_SET
*Solid Section, elset=GRAIN107_SET, material=GRAIN_MAT107
,
** Section: Section-64-GRAIN64_SET
*Solid Section, elset=GRAIN64_SET, material=GRAIN_MAT64
,
** Section: Section-122-GRAIN122_SET
*Solid Section, elset=GRAIN122_SET, material=GRAIN_MAT122
,
** Section: Section-86-GRAIN86_SET
*Solid Section, elset=GRAIN86_SET, material=GRAIN_MAT86
,
** Section: Section-58-GRAIN58_SET
*Solid Section, elset=GRAIN58_SET, material=GRAIN_MAT58
,
** Section: Section-83-GRAIN83_SET
*Solid Section, elset=GRAIN83_SET, material=GRAIN_MAT83
,
** Section: Section-13-GRAIN13_SET
*Solid Section, elset=GRAIN13_SET, material=GRAIN_MAT13
,
** Section: Section-131-GRAIN131_SET
*Solid Section, elset=GRAIN131_SET, material=GRAIN_MAT131
,
** Section: Section-128-GRAIN128_SET
*Solid Section, elset=GRAIN128_SET, material=GRAIN_MAT128
,
** Section: Section-91-GRAIN91_SET
*Solid Section, elset=GRAIN91_SET, material=GRAIN_MAT91
,
** Section: Section-28-GRAIN28_SET
*Solid Section, elset=GRAIN28_SET, material=GRAIN_MAT28
,
** Section: Section-159-GRAIN159_SET
*Solid Section, elset=GRAIN159_SET, material=GRAIN_MAT159
,
** Section: Section-148-GRAIN148_SET
*Solid Section, elset=GRAIN148_SET, material=GRAIN_MAT148
,
** Section: Section-67-GRAIN67_SET
*Solid Section, elset=GRAIN67_SET, material=GRAIN_MAT67
,
** Section: Section-72-GRAIN72_SET
*Solid Section, elset=GRAIN72_SET, material=GRAIN_MAT72
,
** Section: Section-132-GRAIN132_SET
*Solid Section, elset=GRAIN132_SET, material=GRAIN_MAT132
,
** Section: Section-105-GRAIN105_SET
*Solid Section, elset=GRAIN105_SET, material=GRAIN_MAT105
,
** Section: Section-63-GRAIN63_SET
*Solid Section, elset=GRAIN63_SET, material=GRAIN_MAT63
,
** Section: Section-25-GRAIN25_SET
*Solid Section, elset=GRAIN25_SET, material=GRAIN_MAT25
,
** Section: Section-95-GRAIN95_SET
*Solid Section, elset=GRAIN95_SET, material=GRAIN_MAT95
,
** Section: Section-65-GRAIN65_SET
*Solid Section, elset=GRAIN65_SET, material=GRAIN_MAT65
,
** Section: Section-145-GRAIN145_SET
*Solid Section, elset=GRAIN145_SET, material=GRAIN_MAT145
,
** Section: Section-99-GRAIN99_SET
*Solid Section, elset=GRAIN99_SET, material=GRAIN_MAT99
,
** Section: Section-147-GRAIN147_SET
*Solid Section, elset=GRAIN147_SET, material=GRAIN_MAT147
,
** Section: Section-47-GRAIN47_SET
*Solid Section, elset=GRAIN47_SET, material=GRAIN_MAT47
,
** Section: Section-18-GRAIN18_SET
*Solid Section, elset=GRAIN18_SET, material=GRAIN_MAT18
,
** Section: Section-156-GRAIN156_SET
*Solid Section, elset=GRAIN156_SET, material=GRAIN_MAT156
,
** Section: Section-23-GRAIN23_SET
*Solid Section, elset=GRAIN23_SET, material=GRAIN_MAT23
,
** Section: Section-71-GRAIN71_SET
*Solid Section, elset=GRAIN71_SET, material=GRAIN_MAT71
,
** Section: Section-114-GRAIN114_SET
*Solid Section, elset=GRAIN114_SET, material=GRAIN_MAT114
,
** Section: Section-51-GRAIN51_SET
*Solid Section, elset=GRAIN51_SET, material=GRAIN_MAT51
,
** Section: Section-29-GRAIN29_SET
*Solid Section, elset=GRAIN29_SET, material=GRAIN_MAT29
,
** Section: Section-11-GRAIN11_SET
*Solid Section, elset=GRAIN11_SET, material=GRAIN_MAT11
,
** Section: Section-77-GRAIN77_SET
*Solid Section, elset=GRAIN77_SET, material=GRAIN_MAT77
,
** Section: Section-50-GRAIN50_SET
*Solid Section, elset=GRAIN50_SET, material=GRAIN_MAT50
,
** Section: Section-111-GRAIN111_SET
*Solid Section, elset=GRAIN111_SET, material=GRAIN_MAT111
,
** Section: Section-55-GRAIN55_SET
*Solid Section, elset=GRAIN55_SET, material=GRAIN_MAT55
,
** Section: Section-154-GRAIN154_SET
*Solid Section, elset=GRAIN154_SET, material=GRAIN_MAT154
,
** Section: Section-153-GRAIN153_SET
*Solid Section, elset=GRAIN153_SET, material=GRAIN_MAT153
,
** Section: Section-157-GRAIN157_SET
*Solid Section, elset=GRAIN157_SET, material=GRAIN_MAT157
,
** Section: Section-26-GRAIN26_SET
*Solid Section, elset=GRAIN26_SET, material=GRAIN_MAT26
,
** Section: Section-120-GRAIN120_SET
*Solid Section, elset=GRAIN120_SET, material=GRAIN_MAT120
,
** Section: Section-94-GRAIN94_SET
*Solid Section, elset=GRAIN94_SET, material=GRAIN_MAT94
,
** Section: Section-34-GRAIN34_SET
*Solid Section, elset=GRAIN34_SET, material=GRAIN_MAT34
,
** Section: Section-74-GRAIN74_SET
*Solid Section, elset=GRAIN74_SET, material=GRAIN_MAT74
,
** Section: Section-15-GRAIN15_SET
*Solid Section, elset=GRAIN15_SET, material=GRAIN_MAT15
,
** Section: Section-9-GRAIN9_SET
*Solid Section, elset=GRAIN9_SET, material=GRAIN_MAT9
,
** Section: Section-146-GRAIN146_SET
*Solid Section, elset=GRAIN146_SET, material=GRAIN_MAT146
,
** Section: Section-115-GRAIN115_SET
*Solid Section, elset=GRAIN115_SET, material=GRAIN_MAT115
,
** Section: Section-41-GRAIN41_SET
*Solid Section, elset=GRAIN41_SET, material=GRAIN_MAT41
,
** Section: Section-22-GRAIN22_SET
*Solid Section, elset=GRAIN22_SET, material=GRAIN_MAT22
,
** Section: Section-113-GRAIN113_SET
*Solid Section, elset=GRAIN113_SET, material=GRAIN_MAT113
,
** Section: Section-127-GRAIN127_SET
*Solid Section, elset=GRAIN127_SET, material=GRAIN_MAT127
,
** Section: Section-87-GRAIN87_SET
*Solid Section, elset=GRAIN87_SET, material=GRAIN_MAT87
,
** Section: Section-79-GRAIN79_SET
*Solid Section, elset=GRAIN79_SET, material=GRAIN_MAT79
,
** Section: Section-110-GRAIN110_SET
*Solid Section, elset=GRAIN110_SET, material=GRAIN_MAT110
,
** Section: Section-161-GRAIN161_SET
*Solid Section, elset=GRAIN161_SET, material=GRAIN_MAT161
,
** Section: Section-143-GRAIN143_SET
*Solid Section, elset=GRAIN143_SET, material=GRAIN_MAT143
,
** Section: Section-103-GRAIN103_SET
*Solid Section, elset=GRAIN103_SET, material=GRAIN_MAT103
,
** Section: Section-78-GRAIN78_SET
*Solid Section, elset=GRAIN78_SET, material=GRAIN_MAT78
,
** Section: Section-112-GRAIN112_SET
*Solid Section, elset=GRAIN112_SET, material=GRAIN_MAT112
,
** Section: Section-138-GRAIN138_SET
*Solid Section, elset=GRAIN138_SET, material=GRAIN_MAT138
,
** Section: Section-139-GRAIN139_SET
*Solid Section, elset=GRAIN139_SET, material=GRAIN_MAT139
,
** Section: Section-6-GRAIN6_SET
*Solid Section, elset=GRAIN6_SET, material=GRAIN_MAT6
,
** Section: Section-152-GRAIN152_SET
*Solid Section, elset=GRAIN152_SET, material=GRAIN_MAT152
,
** Section: Section-117-GRAIN117_SET
*Solid Section, elset=GRAIN117_SET, material=GRAIN_MAT117
,
** Section: Section-151-GRAIN151_SET
*Solid Section, elset=GRAIN151_SET, material=GRAIN_MAT151
,
** Section: Section-52-GRAIN52_SET
*Solid Section, elset=GRAIN52_SET, material=GRAIN_MAT52
,
** Section: Section-27-GRAIN27_SET
*Solid Section, elset=GRAIN27_SET, material=GRAIN_MAT27
,
*End Part
**
**
** ASSEMBLY
**
*Assembly, name=Assembly
**
*Instance, name=PART-1-1, part=PART-1
*End Instance
**
*Nset, nset=DISPX, instance=PART-1-1, generate
1000255, 1039935,     256
*Nset, nset=FIXEDX, instance=PART-1-1, generate
1000000, 1039680,     256
*Nset, nset=FIXEDY, instance=PART-1-1
1000000,1000255
*End Assembly
** ----------------------------------------------------------------
**
** STEP: Step-1
**
*Step, name=Step-1, nlgeom=NO
*Static
1., 1., 1e-05, 1.
**
** BOUNDARY CONDITIONS
**
** Name: BC-1 Type: Displacement/Rotation
*Boundary
FIXEDX, 1, 1
** Name: BC-2 Type: Displacement/Rotation
*Boundary
DISPX, 1, 1, 1.
** Name: BC-3 Type: Displacement/Rotation
*Boundary
FIXEDY, 2, 2
**
** OUTPUT REQUESTS
**
*Restart, write, frequency=0
**
** FIELD OUTPUT: F-Output-1
**
*Output, field, variable=PRESELECT
**
** HISTORY OUTPUT: H-Output-1
**
*Output, history, variable=PRESELECT
*End Step
