*Heading
** Job name: test Model name: cube
** Generated by: Abaqus/CAE 2019
*Preprint, echo=NO, model=NO, history=NO, contact=NO
**
** PARTS
**
*Part, name=PART-1
*Node
1000000,      -2039.5,        27.75,          28.
1000001,      -2031.5,        27.75,          28.
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*Element, type=S4R
4827,1000256,1000255,1000000,1000001
4828,1000257,1000256,1000001,1000002
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*Elset, elset=GRAIN105_SET
 4827, 4828, 4829, 5081, 5082, 5083, 5335, 5336, 5337, 5589, 5590, 5591, 5843, 5844, 5845
*Elset, elset=GRAIN107_SET
 4830, 4831, 5084, 5085
*Elset, elset=GRAIN152_SET
 5338, 5339, 5592, 5593, 5846, 5847
** Section: Section-105-GRAIN105_SET
*Solid Section, elset=GRAIN105_SET, material=GRAIN_MAT105
,
** Section: Section-107-GRAIN107_SET
*Solid Section, elset=GRAIN107_SET, material=GRAIN_MAT107
,
** Section: Section-152-GRAIN152_SET
*Solid Section, elset=GRAIN152_SET, material=GRAIN_MAT152
,
*End Part
**
**
** ASSEMBLY
**
*Assembly, name=Assembly
**
*Instance, name=PART-1-1, part=PART-1
*End Instance
**
*Nset, nset=DispX, instance=PART-1-1, generate
1000005, 1001280,     255
*Nset, nset=FixedX, instance=PART-1-1, generate
1000000, 1001275,     255
*Nset, nset=FixedY, instance=PART-1-1, generate
1000000, 1000005,       1
*Nset, nset=FixedZ, instance=PART-1-1
1000000,1000001,1000002,1000003,1000004,1000005
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*End Assembly
** ----------------------------------------------------------------
**
** STEP: Step-1
**
*Step, name=Step-1, nlgeom=yes
*Static
1., 1., 1e-05, 1.
**
** BOUNDARY CONDITIONS
**
** Name: BC-1 Type: Displacement/Rotation
*Boundary
FixedX, 1, 1
** Name: BC-2 Type: Displacement/Rotation
*Boundary
FixedY, 2, 2
** Name: BC-3 Type: Displacement/Rotation
*Boundary
FixedZ, 3, 3
** Name: BC-4 Type: Displacement/Rotation
*Boundary
DispX, 1, 1, 1.
**
** OUTPUT REQUESTS
**
*Restart, write, frequency=0
**
** FIELD OUTPUT: F-Output-1
**
*Output, field, variable=PRESELECT
**
** HISTORY OUTPUT: H-Output-1
**
*Output, history, variable=PRESELECT
*End Step
